*HEADING
** Job name: Job-1 Model name: Model-1
*NODE, SYSTEM=R
    1, -500, -250,    0
    2, -250, -250,    0
    3,    0, -250,    0
    4,  250, -250,    0
    5,  500, -250,    0
    6, -500,    0,    0
    7, -250,    0,    0
    8,    0,    0,    0
    9,  250,    0,    0
   10,  500,    0,    0
   11, -500,  250,    0
   12, -250,  250,    0
   13,    0,  250,    0
   14,  250,  250,    0
   15,  500,  250,    0
   16, -375, -250,    0
   17, -250, -125,    0
   18, -375,    0,    0
   19, -500, -125,    0
   20, -125, -250,    0
   21,    0, -125,    0
   22, -125,    0,    0
   23,  125, -250,    0
   24,  250, -125,    0
   25,  125,    0,    0
   26,  375, -250,    0
   27,  500, -125,    0
   28,  375,    0,    0
   29, -250,  125,    0
   30, -375,  250,    0
   31, -500,  125,    0
   32,    0,  125,    0
   33, -125,  250,    0
   34,  250,  125,    0
   35,  125,  250,    0
   36,  500,  125,    0
   37,  375,  250,    0
   38, -375, -125,    0
   39, -125, -125,    0
   40,  125, -125,    0
   41,  375, -125,    0
   42, -375,  125,    0
   43, -125,  125,    0
   44,  125,  125,    0
   45,  375,  125,    0
*ELEMENT, TYPE=S8R5, ELSET=BMI3
    1,    1,    2,    7,    6,   16,   17,   18,   19
    2,    2,    3,    8,    7,   20,   21,   22,   17
    3,    3,    4,    9,    8,   23,   24,   25,   21
    4,    4,    5,   10,    9,   26,   27,   28,   24
    5,    6,    7,   12,   11,   18,   29,   30,   31
    6,    7,    8,   13,   12,   22,   32,   33,   29
    7,    8,    9,   14,   13,   25,   34,   35,   32
    8,    9,   10,   15,   14,   28,   36,   37,   34
*SHELL GENERAL SECTION, ELSET=BMI3
 8.170E+05, 3.594E+04, 8.170E+05,  0.00    ,  0.00    , 4.474E+04,  0.00    ,  0.00
  0.00    , 8.560E+06,  0.00    ,  0.00    ,  0.00    , 3.116E+05, 5.610E+06,  0.00
  0.00    ,  0.00    ,  0.00    ,  0.00    , 3.879E+05,
*TRANSVERSE SHEAR STIFFNESS
** H44, H55, H45
 3.781E+04, 3.796E+04,  0.00
*Step, name=Step-1, nlgeom=NO, perturbation
*Buckle
10, , 10, 300
*BOUNDARY
**NSET=Set-1
    1,    3,,  0.00
    2,    3,,  0.00
    3,    3,,  0.00
    4,    3,,  0.00
    5,    3,,  0.00
    6,    3,,  0.00
   10,    3,,  0.00
   11,    3,,  0.00
   12,    3,,  0.00
   13,    3,,  0.00
   14,    3,,  0.00
   15,    3,,  0.00
   16,    3,,  0.00
   19,    3,,  0.00
   20,    3,,  0.00
   23,    3,,  0.00
   26,    3,,  0.00
   27,    3,,  0.00
   30,    3,,  0.00
   31,    3,,  0.00
   33,    3,,  0.00
   35,    3,,  0.00
   36,    3,,  0.00
   37,    3,,  0.00
*BOUNDARY
**NSET=Set-2
    1,    1,,  0.00
    6,    1,,  0.00
   11,    1,,  0.00
   19,    1,,  0.00
   31,    1,,  0.00
*BOUNDARY
**NSET=Set-3
    1,    2,,  0.00
    2,    2,,  0.00
    3,    2,,  0.00
    4,    2,,  0.00
    5,    2,,  0.00
   16,    2,,  0.00
   20,    2,,  0.00
   23,    2,,  0.00
   26,    2,,  0.00
*BOUNDARY
**NSET=Set-1
    1,    3,,  0.00
    2,    3,,  0.00
    3,    3,,  0.00
    4,    3,,  0.00
    5,    3,,  0.00
    6,    3,,  0.00
   10,    3,,  0.00
   11,    3,,  0.00
   12,    3,,  0.00
   13,    3,,  0.00
   14,    3,,  0.00
   15,    3,,  0.00
   16,    3,,  0.00
   19,    3,,  0.00
   20,    3,,  0.00
   23,    3,,  0.00
   26,    3,,  0.00
   27,    3,,  0.00
   30,    3,,  0.00
   31,    3,,  0.00
   33,    3,,  0.00
   35,    3,,  0.00
   36,    3,,  0.00
   37,    3,,  0.00
*BOUNDARY
**NSET=Set-1
    1,    3,,  0.00
    2,    3,,  0.00
    3,    3,,  0.00
    4,    3,,  0.00
    5,    3,,  0.00
    6,    3,,  0.00
   10,    3,,  0.00
   11,    3,,  0.00
   12,    3,,  0.00
   13,    3,,  0.00
   14,    3,,  0.00
   15,    3,,  0.00
   16,    3,,  0.00
   19,    3,,  0.00
   20,    3,,  0.00
   23,    3,,  0.00
   26,    3,,  0.00
   27,    3,,  0.00
   30,    3,,  0.00
   31,    3,,  0.00
   33,    3,,  0.00
   35,    3,,  0.00
   36,    3,,  0.00
   37,    3,,  0.00
*BOUNDARY
**NSET=Set-2
    1,    1,,  0.00
    6,    1,,  0.00
   11,    1,,  0.00
   19,    1,,  0.00
   31,    1,,  0.00
*BOUNDARY
**NSET=Set-2
    1,    1,,  0.00
    6,    1,,  0.00
   11,    1,,  0.00
   19,    1,,  0.00
   31,    1,,  0.00
*BOUNDARY
**NSET=Set-3
    1,    2,,  0.00
    2,    2,,  0.00
    3,    2,,  0.00
    4,    2,,  0.00
    5,    2,,  0.00
   16,    2,,  0.00
   20,    2,,  0.00
   23,    2,,  0.00
   26,    2,,  0.00
*BOUNDARY
**NSET=Set-3
    1,    2,,  0.00
    2,    2,,  0.00
    3,    2,,  0.00
    4,    2,,  0.00
    5,    2,,  0.00
   16,    2,,  0.00
   20,    2,,  0.00
   23,    2,,  0.00
   26,    2,,  0.00
*CLOAD
**NSET=x-corner
    5,    1, -41.7
   15,    1, -41.7
*CLOAD
**NSET=x-e-corner
   10,    1, -83.3
*CLOAD
**NSET=x-e-mid
   27,    1, -167.
   36,    1, -167.
*CLOAD
**NSET=y-corner
   11,    2, -41.7
   15,    2, -41.7
*CLOAD
**NSET=y-e-corner
   12,    2, -83.3
   13,    2, -83.3
   14,    2, -83.3
*CLOAD
**NSET=y-e-mid
   30,    2, -167.
   33,    2, -167.
   35,    2, -167.
   37,    2, -167.
*End Step
